<!DOCTYPE autopilot SYSTEM "autopilot.dtd">

<autopilot name="Quadrotor Autopilot (Basic version)">

  <state_machine name="ap" freq="PERIODIC_FREQUENCY" gcs_mode="true" settings_mode="true" settings_handler="autopilot_generated|SetModeHandler">

    <includes>
      <include name="generated/airframe.h"/>
      <include name="autopilot.h"/>
      <include name="autopilot_rc_helpers.h"/>
      <include name="navigation.h"/>
      <include name="guidance.h"/>
      <include name="stabilization.h"/>
      <include name="modules/radio_control/radio_control.h"/>
      <include name="modules/gps/gps.h"/>
      <include name="modules/actuators/actuators.h"/>
      <define name="MODE_AUTO2" value="AP_MODE_NAV" cond="ifndef MODE_AUTO2"/>
      <define name="RCLost()" value="(radio_control.status == RC_REALLY_LOST)"/>
    </includes>

    <settings>
      <dl_setting var="autopilot.kill_throttle" min="0" step="1" max="1" module="autopilot" values="Resurrect|Kill" handler="KillThrottle"/>
      <dl_setting var="autopilot_mode_auto2" min="2" step="1" max="3" module="autopilot" values="NAV|GUIDED"/>
    </settings>

    <control_block name="set_commands">
      <call fun="SetRotorcraftCommands(stabilization.cmd, autopilot_in_flight(), autopilot_get_motors_on())"/>
    </control_block>

    <control_block name="run_attitude_control">
      <call fun="guidance_v_run(autopilot_in_flight())" store="struct ThrustSetpoint thrust_sp"/>
      <call fun="stabilization_run(autopilot_in_flight(), &stabilization.rc_sp, &thrust_sp, stabilization.cmd)"/>
    </control_block>

    <control_block name="run_guidance_control">
      <call fun="guidance_v_run(autopilot_in_flight())" store="struct ThrustSetpoint thrust_sp"/>
      <call fun="guidance_h_run(autopilot_in_flight())" store="struct StabilizationSetpoint stab_sp"/>
      <call fun="stabilization_run(autopilot_in_flight(), &stab_sp, &thrust_sp, stabilization.cmd)"/>
    </control_block>

    <exceptions>
      <exception cond="nav.too_far_from_home" deroute="HOME"/>
      <exception cond="kill_switch_is_on()" deroute="KILL"/>
    </exceptions>

    <mode name="ATTITUDE_DIRECT" shortname="ATT">
      <select cond="RCMode0()"/>
      <on_enter>
        <call fun="guidance_h_mode_changed(GUIDANCE_H_MODE_NONE)"/>
        <call fun="guidance_v_mode_changed(GUIDANCE_V_MODE_RC_DIRECT)"/>
        <call fun="stabilization_mode_changed(STABILIZATION_MODE_ATTITUDE, STABILIZATION_ATT_SUBMODE_HEADING)"/>
      </on_enter>
      <control freq="NAVIGATION_FREQUENCY">
        <call fun="nav_periodic_task()"/>
      </control>
      <control>
        <call_block name="run_attitude_control"/>
        <call_block name="set_commands"/>
      </control>
      <exception cond="RCLost()" deroute="FAILSAFE"/>
    </mode>

    <mode name="MODULE">
      <select cond="RCMode1()"/>
      <on_enter>
        <call fun="guidance_module_enter()"/>
      </on_enter>
      <control freq="NAVIGATION_FREQUENCY">
        <call fun="nav_periodic_task()"/>
      </control>
      <control>
        <call fun="guidance_module_run(autopilot_in_flight())"/>
        <call_block name="set_commands"/>
      </control>
      <exception cond="RCLost()" deroute="FAILSAFE"/>
    </mode>

    <mode name="NAV">
      <select cond="RCMode2()" exception="HOME"/>
      <select cond="$DEFAULT_MODE"/>
      <on_enter>
        <call fun="guidance_h_mode_changed(GUIDANCE_H_MODE_NAV)"/>
        <call fun="guidance_v_mode_changed(GUIDANCE_V_MODE_NAV)"/>
        <call fun="stabilization_mode_changed(STABILIZATION_MODE_ATTITUDE, STABILIZATION_ATT_SUBMODE_HEADING)"/>
      </on_enter>
      <control freq="NAVIGATION_FREQUENCY">
        <call fun="nav_periodic_task()"/>
      </control>
      <control>
        <call_block name="run_guidance_control"/>
        <call_block name="set_commands"/>
      </control>
      <exception cond="GpsIsLost() && autopilot_in_flight()" deroute="FAILSAFE"/>
    </mode>

    <mode name="HOME">
      <on_enter>
        <call fun="guidance_h_mode_changed(GUIDANCE_H_MODE_NAV)"/>
        <call fun="guidance_v_mode_changed(GUIDANCE_V_MODE_NAV)"/>
        <call fun="stabilization_mode_changed(STABILIZATION_MODE_ATTITUDE, STABILIZATION_ATT_SUBMODE_HEADING)"/>
      </on_enter>
      <control freq="NAVIGATION_FREQUENCY">
        <call fun="nav_home()"/>
      </control>
      <control>
        <call_block name="run_guidance_control"/>
        <call_block name="set_commands"/>
      </control>
      <exception cond="GpsIsLost()" deroute="FAILSAFE"/>
    </mode>

    <!-- Safe landing -->
    <mode name="FAILSAFE" shortname="FAIL">
      <on_enter>
        <call fun="guidance_h_mode_changed(GUIDANCE_H_MODE_NONE)"/>
        <call fun="guidance_v_mode_changed(GUIDANCE_V_MODE_CLIMB)"/>
        <call fun="stabilization_mode_changed(STABILIZATION_MODE_ATTITUDE, STABILIZATION_ATT_SUBMODE_HEADING)"/>
        <call fun="guidance_v_set_vz(FAILSAFE_DESCENT_SPEED)"/>
      </on_enter>
      <control>
        <call fun="stabilization_get_failsafe_sp()" store="struct StabilizationSetpoint stab_failsafe"/>
        <call fun="guidance_v_run(autopilot_in_flight())" store="struct ThrustSetpoint thrust_sp"/>
        <call fun="stabilization_run(autopilot_in_flight(), &stab_failsafe, &thrust_sp, stabilization.cmd)"/>
        <call_block name="set_commands"/>
      </control>
      <exception cond="!GpsIsLost()" deroute="$LAST_MODE"/>
    </mode>

    <!-- Kill throttle mode -->
    <mode name="KILL">
      <select cond="kill_switch_is_on()"/>
      <on_enter>
        <call fun="guidance_h_mode_changed(GUIDANCE_H_MODE_NONE)"/>
        <call fun="stabilization_mode_changed(STABILIZATION_MODE_NONE, 0)"/>
        <call fun="guidance_v_mode_changed(GUIDANCE_V_MODE_KILL)"/>
        <call fun="autopilot_set_in_flight(false)"/>
        <call fun="autopilot_set_motors_on(false)"/>
        <!--call fun="stabilization.cmd[COMMAND_THRUST] = 0"/-->
      </on_enter>
      <control>
        <call fun="SetCommands(commands_failsafe)"/>
      </control>
    </mode>

  </state_machine>

</autopilot>
